class forecast
{
	double temperature[degF];
	double wind_speed[m/s];
	double wind_dir[deg];
}
module tape;
#define NOAA_FORECAST_TIMEZONE=${SHELL gridlabd timezone local}
#define NOAA_FORECAST_STARTTIME=2022-11-22T12:00:00-08:00
#define NOAA_FORECAST_STOPTIME=2022-12-05T10:00:00-08:00
object forecast
{
	name "weather";
	object player
	{
		file "weather.csv";
		property "temperature,wind_speed,wind_dir";
	};
}
